# Fertilizantes T

Dataset: EcoSpold 1, unit process
Functional unit: 1000 kg
Category: _TOMATE / unspecified
Geography: GLO
Generated by: default
copyright: false
accessRestrictedTo: 0

## Reference product
- Fertilizantes T [GLO]: 1000 kg

## Inputs from technosphere
- Ammonium nitrate phosphate, as N, at regional storehouse {RER} [RER]: 2 kg
- Ammonium nitrate phosphate, as P2O5, at regional storehouse {RER} [RER]: 2.29 kg
- Potassium nitrate, as K2O, at regional storehouse {RER} [RER]: 3.6 kg
- Diesel, burned in agricultural machine {CH} [CH]: 0.075 kg

## Emissions to nature
- Nitrogen oxides, ES [Emission to air, unspecified]: 0.08 kg
- Dinitrogen monoxide [Emission to air, unspecified]: 0.01 kg
- Ammonia [emissions to air, unspecified]: 0.0328 kg
- Nitrate [emissions to water, unspecified]: 0.6 kg

## Sources
- default, 9999, Created for EcoSpold 1 compatibility, none

# Pesticidas T

Dataset: EcoSpold 1, multi-output process
Functional unit: 1000 kg
Category: _TOMATE / unspecified
Geography: GLO
Generated by: default
copyright: false
accessRestrictedTo: 0

## Reference product
- Pesticidas T [GLO]: 1000 kg

## By-products
- Pendimethalin, at regional storage {RER} [RER]: 0.00125635 kg

## Inputs from technosphere
- Pendimethalin, at regional storage {RER} [RER]: 0.0139594 kg
- Triazine-compounds, at regional storehouse {RER} [RER]: 0.00621 kg
- Pyretroid-compounds, at regional storehouse {RER} [RER]: 0.0002066 kg
- xx Pyridine-compounds, at regional storehouse {RER} [RER]: 0.002 kg
- Metolachlor, at regional storehouse {RER} [RER]: 0.0138528 kg
- Pesticide unspecified, at regional storehouse {RER} [RER]: 0.00582875 kg
- Cyclic N-compounds, at regional storehouse {RER} [RER]: 0.003446 kg
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
## Emissions to nature
- Chlorpyrifos [Emission to air, unspecified]: 0 kg
- Metalaxyl-M [Emission to air, unspecified]: 0 kg

## Sources
- default, 9999, Created for EcoSpold 1 compatibility, none

# Manejo de cultivo T

Dataset: EcoSpold 1, unit process
Functional unit: 1000 kg
Category: _TOMATE / unspecified
Geography: GLO
Generated by: default
copyright: false
accessRestrictedTo: 0

## Reference product
- Manejo de cultivo T [GLO]: 1000 kg

## Inputs from technosphere
- Tractor, production {CH} [CH]: 0, 0 kg (2 entries)
- Tillage, harrowing, by rotary harrow {CH} [CH]: 0.005, 0.015 ha (2 entries)
- Diesel, burned in agricultural machine {CH} [CH]: 0.348754, 0.33696 kg (2 entries)
- Application of plant protection products, by field sprayer {CH} [CH]: 0.0392857 m2
- Combine harvesting {CH} [CH]: 0 ha
- Agricultural machinery, tillage, production {CH} [CH]: 0 kg
- Tillage, cultivating, chiselling {CH} [CH]: 0.025 ha
- Agricultural machinery, general, production {CH} [CH]: 0 kg
- Harvester, production {CH} [CH]: 0.028286 kg
- xx Tillage, rotary cultivator {CH} [CH]: 0.0066667 ha
- Planting {CH} [CH]: 0.003 ha

## Inputs from nature
- Occupation, annual crop, irrigated [Resource, biotic]: 0.00323288 ha*a
- Water, unspecified natural origin, ES [Resource, in ground]: 65 m3
- Transformation, to annual crop, irrigated [Resource, in ground]: 0.00323288 ha

## Sources
- default, 9999, Created for EcoSpold 1 compatibility, none

# Sistema de riego T

Dataset: EcoSpold 1, unit process
Functional unit: 1000 kg
Category: _TOMATE / unspecified
Geography: GLO
Generated by: default
copyright: false
accessRestrictedTo: 0

## Reference product
- Sistema de riego T [GLO]: 1000 kg

## Inputs from technosphere
- Extrusion, plastic pipes {RER} [RER]: 0.922279 kg
- Diesel, burned in agricultural machine {CH} [CH]: 0.70272 kg
- Tractor, production {CH} [CH]: 0 kg
- Steel product manufacturing, average metal working {RER} [RER]: 0.0325 kg
- Polystyrene, expandable, at plant {RER} [RER]: 0 kg
- Steel, low alloyed, secondary production (100% Rec.) {CH} [CH]: 0.0325 kg
- Polypropylene, granulate, at plant {RER} [RER]: 0.78367 kg
- Transport, freight, lorry, 7.5t-16t gross weight, fleet average {RER} [RER]: 0 t*km
- Polyvinylchloride, emulsion polymerised, at plant {RER} [RER]: 0.138 kg
- Stretch blow moulding {RER} [RER]: 0.922279 kg
- xx Recycling PE {RER} [RER]: 0.784 kg
- Recycling steel and iron {RER} [RER]: 0 kg
- xx Recycling PVC {RER} [RER]: 0.138 kg
- xx Recycling PP {RER} [RER]: 0.001 kg

## Inputs from nature
- Water, well, RER [Resource, in ground]: 0 m3

## Sources
- default, 9999, Created for EcoSpold 1 compatibility, none
